Simulations: Version=160
  DataStore
  Folder Corn in Iowa
    Simulation Corn2020
      Weather: FileName=Ames_Climate_Change.met
      Clock: Start=2074-01-01; End=2082-12-31
      Summary
      SoilArbitrator
      Zone Field: Area=1; Slope=0; AspectAngle=0; Altitude=50
        SurfaceOrganicMatter: InitialResidueName=soybean; InitialResidueType=soybean; InitialResidueMass=2500; InitialStandingFraction=0; InitialCPR=0; InitialCNR=55
        Fertiliser
        Report: EventNames=[maize].Harvesting
          VariableNames:
            [Clock].Today
            [Clock].Today.Year
            [Maize].Grain.Wt * 0.159/0.85 as CornYield_buac
            [Maize].Grain.Wt * 10 as CornYield_kgha
            [Maize].AboveGround.Wt * 10 as Crop_Biomass_kgha
            Mean of [Weather].MeanT from 1-may to 1-oct as MaySepMeanTemp
            Mean of [Weather].MaxT from 1-jul to 31-jul as JulyMaxTemp
            Sum of [Weather].Rain from 1-may to 1-oct as MaySepRain
            Sum of [Weather].Rain from [Maize].Sowing to [Maize].Harvesting as PlantingHarvestingRain
            [Maize].Phenology.FloweringDAS
            [Maize].Phenology.MaturityDAS
        Plant Maize
        Soil SiCL (Clarion No33): SoilType=Clarion; Region=Boone; State=Iowa; Country=US; ApsoilNumber=33; Latitude=42.02204; Longitude=-93.769115
          DataSource:
            Original data by http://websoilsurvey.sc.egov.usda.gov/App/HomePage.htm
            Profile developed by Integrated Cropping Systems Lab, Department of Agronomy, ISU
          Comments:
            The Clarion series consists of very deep, moderately well drained soils on uplands. These soils formed in glacial till. Slopes range from 1 to 9 percent. Mean annual air temperature is about 8 degrees C (47 degrees F). Mean annual precipitation is about 74 centimeters (29 inches).
            TAXONOMIC CLASS: Fine-loamy, mixed, superactive, mesic Typic Hapludolls
            TYPICAL PEDON: Clarion loam, on a convex upland with a slope of 4 percent, in a cultivated field. (Colors are for moist soil unless otherwise stated.)
            Ap--0 to 18 centimeters (7 inches); black (10YR 2/1) loam, very dark gray (10YR 3/1) dry; weak fine subangular blocky structure; friable; many roots; about 3 percent gravel; slightly acid; abrupt smooth boundary.
            A1--18 to 30 centimeters (7 to 12 inches); very dark brown (10YR 2/2) loam, very dark grayish brown (10YR 3/2) dry; weak fine subangular blocky structure; friable; many roots; about 3 percent gravel; common worm casts; slightly acid; gradual smooth boundary.
            A2--30 to 46 centimeters (12 to 18 inches); dark brown (10YR 3/3) loam, brown (10YR 4/3) dry; weak fine subangular blocky structure; friable; many roots; many distinct very dark grayish brown (10YR 3/2) coats on faces of peds; about 3 percent gravel; slightly acid; gradual smooth boundary. [Combined thickness of the A horizon is 25 to 51 centimeters (10 to 20 inches).]
            Bw1--46 to 66 centimeters (18 to 26 inches); dark yellowish brown (10YR 4/4) loam; weak fine subangular blocky structure; friable; many roots; many fine pores; common distinct dark brown (10YR 3/3) coats on faces of peds; about 3 percent gravel; neutral; gradual smooth boundary.
            Bw2--66 to 91 centimeters (26 to 36 inches); dark yellowish brown (10YR 4/4) loam; weak medium subangular blocky structure; friable; common roots; many fine pores; about 3 percent gravel; neutral; gradual smooth boundary. [Combined thickness of the Bw horizon is 20 to 71 centimeters (8 to 28 inches).]
            C1--91 to 132 centimeters (36 to 52 inches); yellowish brown (10YR 5/4) loam; massive; friable; few calcium carbonate masses; few fine distinct yellowish brown (10YR 5/6) Fe concentrations; few fine distinct light brownish gray (2.5Y 6/2) Fe depletions; about 3 percent gravel; strongly effervescent; moderately alkaline; gradual smooth boundary.
            C2--132 to 152 centimeters (52 to 60 inches); yellowish brown (10YR 5/4) loam; massive; friable; common roots; many fine pores; common fine distinct light brownish gray (2.5Y 6/2) Fe depletions; common fine distinct yellowish brown (10YR 5/6) Fe concentrations; about 3 percent gravel; strongly effervescent; moderately alkaline.
          Physical
            Thickness  ParticleSizeClay  ParticleSizeSand  ParticleSizeSilt  BD    AirDry  LL15   DUL    SAT    KS
            100        21                45                34                1.42  0.08    0.16   0.297  0.414  432.152
            100        21                45                34                1.42  0.144   0.16   0.297  0.414  432.152
            200        21                45                34                1.43  0.147   0.147  0.297  0.41   432.152
            200        21                45                34                1.43  0.147   0.147  0.297  0.41   432.152
            200        21                45                34                1.6   0.165   0.165  0.289  0.346  432.152
            200        21                45                34                1.6   0.165   0.165  0.289  0.346  432.152
            400        15                49                36                1.6   0.105   0.105  0.291  0.346  432.152
            400        15                49                36                1.6   0.105   0.105  0.291  0.346  432.152
            SoilCrop MaizeSoil: LL=[0.16, 0.16, 0.147, 0.147, 0.165, 0.165, 0.105, 0.105]; KL=[0.08, 0.08, 0.073, 0.062, 0.052, 0.045, 0.037, 0.03]; XF=[1, 1, 1, 1, 1, 1, 1, 1]
              LL source: Estimated based on local knowledge
            SoilCrop SoybeanSoil: same as Corn in Iowa.Corn2020.Field.SiCL (Clarion No33).Physical.MaizeSoil
          WaterBalance SoilWater: SummerDate=1-jun; SummerU=8.55; SummerCona=3.775; WinterDate=1-nov; WinterU=8.55; WinterCona=3.775; DiffusConst=88; DiffusSlope=35; Salb=0.13; CN2Bare=76; CNRed=20; CNCov=0.8; PSIDul=-100; Thickness=[100, 100, 200, 200, 200, 200, 400, 400]; SWCON=[0.36, 0.36, 0.355, 0.355, 0.271, 0.271, 0.266, 0.266]
          CERESSoilTemperature Temperature
          Organic: FOMCNRatio=45; CarbonUnits=Total
            Thickness  Carbon  SoilCNRatio  FBiom  FInert  FOM
            100        2.035   13           0.04   0.4     297.859
            100        2.035   13           0.035  0.428   254.587
            200        1.453   13           0.016  0.56    167.509
            200        1.453   13           0.011  0.752   110.215
            200        0.727   13           0.01   0.8     73.794
            200        0.727   13           0.01   0.8     49.408
            400        0.145   13           0.01   0.826   29.278
            400        0.145   13           0.01   0.922   17.35
          Chemical: Thickness=[100, 100, 200, 200, 200, 200, 400, 400]; PH=[5.267, 5.267, 5.267, 5.267, 5.532, 5.532, 5.85, 5.85]; PHUnits=Water
            PH source: Estimated based on local knowledge
          Water: Thickness=[100, 100, 200, 200, 200, 200, 400, 400]; InitialValues=[0.297, 0.297, 0.297, 0.297, 0.289, 0.289, 0.291, 0.291]; InitialPAWmm=285.8; RelativeTo=LL15; FilledFromTop=true
          Nutrient
          Solute NO3: Thickness=[100, 100, 200, 200, 200, 200, 400, 400]; InitialValues=[9.39, 7.825, 2.331, 1.166, 0.815, 0.543, 0.208, 0]; InitialValuesUnits=ppm; WaterTableConcentration=0; D0=0; DepthConstant=0; MaxDepthSoluteAccessible=0; RunoffEffectivenessAtMovingSolute=0; MaxEffectiveRunoff=0
          Solute NH4: Thickness=[100, 100, 200, 200, 200, 200, 400, 400]; InitialValues=[4.695, 3.13, 0.583, 0.291, 0, 0, 0, 0]; InitialValuesUnits=ppm; WaterTableConcentration=0; D0=0; DepthConstant=0; MaxDepthSoluteAccessible=0; RunoffEffectivenessAtMovingSolute=0; MaxEffectiveRunoff=0
          Solute Urea: Thickness=[100, 100, 200, 200, 200, 200, 400, 400]; InitialValues=[0, 0, 0, 0, 0, 0, 0, 0]; InitialValuesUnits=kg/ha; WaterTableConcentration=0; D0=0; DepthConstant=0; MaxDepthSoluteAccessible=0; RunoffEffectivenessAtMovingSolute=0; MaxEffectiveRunoff=0
        MicroClimate: a_interception=0; b_interception=1; c_interception=0; d_interception=0; SoilHeatFluxFraction=0.4; MinimumHeightDiffForNewLayer=0; NightInterceptionFraction=0.5; ReferenceHeight=2
        Manager SowMaize
          Crop = [Maize]
          SowDate = 5-May
          CultivarName = B_110
          SowingDepth = 50
          RowSpacing = <row_spacing>
          Population = <plant_population>
```csharp
using APSIM.Shared.Utilities;
using Models.Utilities;
using Models.Soils;
using Models.PMF;
using Models.Core;
using System;

namespace Models
{
    [Serializable]
    public class Script : Model
    {
        [Link] Clock Clock;
        [Link] Fertiliser Fertiliser;
        [Link] Summary Summary;
        [Link] Soil Soil;
        
        [Description("Crop")]
        public IPlant Crop { get; set; }

        [Description("Sowing date (d-mmm)")]
        public string SowDate { get; set; }

        [Display(Type = DisplayType.CultivarName)]
        [Description("Cultivar to be sown")]
        public string CultivarName { get; set; }

        [Description("Sowing depth (mm)")]
        public double SowingDepth { get; set; }

        [Description("Row spacing (mm)")]
        public double RowSpacing { get; set; }

        [Description("Plant population (/m2)")]
        public double Population { get; set; }

        [EventSubscribe("DoManagement")]
        private void OnDoManagement(object sender, EventArgs e)
        {
            if (DateUtilities.WithinDates(SowDate, Clock.Today, SowDate))
            {
                Crop.Sow(population: Population, cultivar: CultivarName, depth: SowingDepth, rowSpacing: RowSpacing);    
            }
        }
    }
}
```
        Manager FertiliseMaize
          FertiliserType = UAN_N
          FertiliserDates = 1-May
          Amount = <init_fert>
          AmountType = True
```csharp
using Models.Soils;
using System;
using Models.Core;
using Models.PMF;
using APSIM.Shared.Utilities;
namespace Models
{
    [Serializable]
    public class Script : Model
    {
        [Link] Clock Clock;
        [Link] Fertiliser Fertiliser;
        
        [Separator("A component to apply fertiliser on one or more dates on every year of the simulation")]

        [Description("Type of fertiliser to apply? ")] 
        public Fertiliser.Types FertiliserType { get; set; }

        [Description("Enter the fertilisation dates as dd-mmm with comma separation (any year information entered will be ignored): ")] 
        public string[] FertiliserDates { get; set; } 

        [Description("Amount of fertiliser to be applied (kg /ha)")] 
        public double Amount { get; set; }

        [Description("Is the above amount to be applied each time? (yes/ticked)? Or is it the total annual amount across all dates (no/unticked)")] 
        public bool AmountType { get; set; }
        
        [EventSubscribe("DoManagement")]
        private void OnDoManagement(object sender, EventArgs e)
        {
            foreach (string ddMMM in FertiliserDates)
            {
                if (DateUtilities.DatesEqual(ddMMM, Clock.Today))
                {
                    if (AmountType)
                        Fertiliser.Apply(Amount: Amount, Type: FertiliserType);
                    else
                        Fertiliser.Apply(Amount: Amount / FertiliserDates.Length, Type: FertiliserType);
                }
            }
        }
    }
}
```
        Manager HarvestMaize
          Crop = [Maize]
```csharp
using APSIM.Shared.Utilities;
using Models.Utilities;
using Models.Soils;
using Models.PMF;
using Models.Core;
using System;

namespace Models
{
    [Serializable] 
    public class Script : Model
    {
        [Description("Crop")]
        public IPlant Crop { get; set; }
        
        [EventSubscribe("DoManagement")]
        private void OnDoManagement(object sender, EventArgs e)
        {
            if (Crop.IsReadyForHarvesting)
            {
                Crop.Harvest();
                Crop.EndCrop();
            }
        }
    }
}
```
        Manager Tillage
          TillageDate = 10-Apr
          Fraction = 0.4
          Depth = 110
```csharp
using Models.Soils;
using System;
using Models.Core;
using Models.PMF;
using APSIM.Shared.Utilities;
using Models.Surface;

namespace Models
{
    [Serializable]
    public class Script : Model
    {
        [Link] Clock Clock;
        [Link] SurfaceOrganicMatter SOM;
        
        [Description("Tillage Date")]
        public string TillageDate { get; set; }
        
        [Description("Fraction of Residues To Incorporate (0-1)")]
        public double Fraction { get; set; }

        [Description("Depth of Tillage (mm)")]
        public double Depth { get; set; }

        [EventSubscribe("DoManagement")]
        private void OnDoManagement(object sender, EventArgs e)
        {
            if (DateUtilities.WithinDates(TillageDate, Clock.Today, TillageDate))
                SOM.Incorporate(Fraction, Depth);
        }
    }
}
```
        Manager Reset
          ResetDate = 1-Jan
          ResetWater = Yes
          ResetNutrients = Yes
          ResetSOM = Yes
```csharp
using Models.Soils.Nutrients;
using APSIM.Shared.Utilities;
using Models.Surface;
using Models.Utilities;
using Models.Soils.Nutrients;
using Models.Soils;
using Models.PMF;
using Models.Core;
using System;
using Models.Interfaces;

namespace Models
{
    [Serializable]
    public class Script : Model
    {
        [Link] private Clock Clock;
        [Link] private Plant Wheat;
        [Link] private ISoilWater SoilWater;
        [Link] private Nutrient nutrient;
        [Link] private SurfaceOrganicMatter SOM;
        [Link] private Summary Summary;

        [Description("Date to reset on:")]
        public string ResetDate {get;set;}

        [Description("Reset Water? (Yes or No)")]
        public string ResetWater {get;set;}

        [Description("Reset Soil Nutrients ? (Yes or No)")]
        public string ResetNutrients {get;set;}

        [Description("Reset Surface Organic Matter? (Yes or No)")]
        public string ResetSOM {get;set;}

        [EventSubscribe("DoManagement")]
        private void OnDoManagement(object sender, EventArgs e)
        {
            if (DateUtilities.WithinDates(ResetDate, Clock.Today, ResetDate))
            {
                if (ResetWater == "Yes")
                {
                    Summary.WriteMessage(this, "Reset Water", MessageType.Diagnostic);
                    SoilWater.Reset();
                }
                if (ResetNutrients == "Yes")
                {
                    Summary.WriteMessage(this, "Reset Nitrogen", MessageType.Diagnostic);
                    nutrient.Reset();
                }
                if (ResetSOM == "Yes")
                {
                    Summary.WriteMessage(this, "Reset Surface OM", MessageType.Diagnostic);
                    SOM.Reset();
                }
            }
        }
    }
}
```
